OpenVSP model (file version 5), 5 components.
Geometry view with OpenVSP parameter names; values to 6 digits, angles in degrees, lengths in the model's unit.
Overall bounding box: X_Min=-0.267805 X_Len=0.705333 Y_Min=-0.4975 Y_Len=0.995 Z_Min=-0.0197697 Z_Len=0.121827

Wing "WingGeom"
  location (X Y Z) -0.2675 0 0, rotation 0 0 0
  symmetric about XZ
  bounding box size 0.700208 0.995 0.0827918
  totals: TotalSpan=0.995 TotalProjectedSpan=0.995 TotalChord=0.298333 TotalArea=0.186575 TotalAR=5.30631 MAC=0.232818
  root: chord 0.7, twist 1.10236, NACA 63-series A=0.132143 IdealCl=0.502321 ThickChord=0.116071
  sections:
    n  Span    Root_Chord  Tip_Chord  Area       Sweep  Sweep_Location  Dihedral  Twist  Twist_Location  tip airfoil
    1  0.03    0.7         0.32       0.0153     30     0.52            0         0      0.25            NACA 63-series A=1 IdealCl=0.775 ThickChord=0.153571
    2  0.0925  0.32        0.15       0.0217375  30     0               0         0      0.25            NACA 4-series Camber=0.0430714 CamberLoc=0.385714 ThickChord=0.119287
    3  0.375   0.15        0.15       0.05625    0      0               0         0      0.25            airfoil file ""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 BaseThickChord=1 ThickChord=0.117857
  SS_Control "Aileron": UStart=0.627451 UEnd=0.730392 Length_C_Start=0.4 Length_C_End=0.4 Length_Start=0.06 Length_End=0.06 LE_Flag=0 Surf_Type=2

Wing "VTail", child of "WingGeom"
  location (X Y Z) 0.33 0 -0.01, rotation 0 0 0
  symmetric about XZ
  bounding box size 0.107528 0.308001 0.118504
  totals: TotalSpan=0.376 TotalProjectedSpan=0.308001 TotalChord=0.095 TotalArea=0.03572 TotalAR=2.65579 MAC=0.0953909
  root: chord 0.105556, twist 0, NACA 4-series Camber=0 CamberLoc=0.2 ThickChord=0.1
  sections:
    n  Span   Root_Chord  Tip_Chord  Area     Sweep  Sweep_Location  Dihedral  Twist  Twist_Location  tip airfoil
    1  0.188  0.105556    0.0844444  0.01786  7      0               35        0      0.25            as above
  SS_Control "Ruddervon": UStart=0.368 UEnd=0.599 Length_C_Start=0.3 Length_C_End=0.3 Length_Start=0.031008 Length_End=0.026619 LE_Flag=0 Surf_Type=2

Blank "BlankGeom", child of "VTail"
  location (X Y Z) 0.03561 0 0, rotation 0 0 0

NGonMesh "MeshGeom_NGon"
  location (X Y Z) 0 0 0, rotation 0 0 0

NGonMesh "MeshGeom_NGon"
  location (X Y Z) 0 0 0, rotation 0 0 0

VSPAERO settings (reference component "WingGeom"): Sref=0.186575 bref=0.995 cref=0.232818 Xcg=0.03561 Ycg=0 Zcg=-0.007 AlphaStart=-15 AlphaEnd=15 AlphaNpts=31 BetaStart=0 BetaEnd=0 BetaNpts=1 MachStart=0 MachEnd=0 MachNpts=1 ReCref=200000 Vinf=16.6 Rho=1.225
  control group "Ruddervon": DeflectionAngle=15
  control group "Aileron": DeflectionAngle=0
